// SBML level 2 version 4

model Smolen2002()
  // Smolen2002_CircClock
  // This model originates from BioModels Database: A Database of Annotated Published Models. It is copyright (c) 2005-2010 The BioModels Team.
  // For more information see the terms of use.
  // To cite BioModels Database, please use Le Novère N., Bornstein B., Broicher A., Courtot M., Donizelli M., Dharuri H., Li L., Sauro H., Schilstra M., Shapiro B., Snoep J.L., Hucka M. (2006) BioModels Database: A Free, Centralized Database of Curated, Published, Quantitative Kinetic Models of Biochemical and Cellular Systems Nucleic Acids Res., 34: D689-D691.
  // biomodels.db:MODEL6618294363
  // biomodels.db:BIOMD0000000025
  // isDescribedBy pubmed:12414672
  // isDerivedFrom pubmed:11517254
  // hasTaxon taxonomy:7227
  // isVersionOf GO:0007623

  // Compartments:
  compartment CELL = 1e-15;  // GO:0005623

  // Species:
  species $EmptySet in CELL = 0;
  species Per in CELL = 5e-16;  // uniprot:P07663
  species dClk in CELL = 1e-16;  // hasPart uniprot:P07663 uniprot:O61735
  species dClkF in CELL; dClkF is "free dClk";  // uniprot:O61735

  // Parameters:
  // free dClk at time t-tau1
  dClkF_tau1 has nM;
  // free dClk at time t-tau2
  dClkF_tau2 has nM;
  tau1 = 10 time;
  tau2 = 10 time;
  Vsp = 0.5 nM_per_hr;
  K1 = 0.3 nM;
  Vsc = 0.25 nM_per_hr;
  K2 = 0.1 nM;
  kdc = 0.5 per_hr;
  kdp = 0.5 per_hr;

  // Assignment rules:
  dClkF := piecewise(0, dClk - Per < 0, dClk - Per);
  dClkF_tau1 := piecewise(0, delay(dClk, tau1) - delay(Per, tau1) < 0, delay(dClk, tau1) - delay(Per, tau1));
  dClkF_tau2 := piecewise(0, delay(dClk, tau2) - delay(Per, tau2) < 0, delay(dClk, tau2) - delay(Per, tau2));

  // Reactions:
  rPer: $EmptySet => Per; Vsp*(dClkF_tau1/(K1 + dClkF_tau1))*CELL; rPer is "Per production";  // modifiers: dClkF; isVersionOf GO:0006412
  rdClk: $EmptySet => dClk; CELL*Vsc*(K2/(K2 + dClkF_tau2)); rdClk is "dClk production";  // modifiers: dClkF; isVersionOf GO:0006412
  rPerD: Per => $EmptySet; kdc*Per*CELL; rPerD is "Per degradation";  // isVersionOf GO:0030163
  rdClkD: dClk => $EmptySet; kdp*dClk*CELL; rdClkD is "dClk degradation";  // isVersionOf GO:0030163

  // Unit definitions:
  unit time = 3600 second; time is "hour (new default)";
  unit substance = 1e-9 mole; substance is "nanomole (new default)";
  unit nM = 1e-9 mole / litre;
  unit nM_per_hr = 1e-9 mole / (litre * 3600 second);
  unit per_hr = 1 / (3600 second);
end
